// COMSOL Multiphysics 5.5.0.359 model "sheild_line2.mph"
// Outline of the model tree

Parameters
  h1 = 0.5
  vp = 100
  vn = 0
  t = 1

Probes
  pdom1: DomainPoint "Domain Point Probe 1" | coords = {0, 20}
    ppb1: PointExpr "Point Probe Expression 1" | expr = V; unit = V; descr = Electric potential; table = tbl1

Geometry
  geom1 "Geometry 1" (2D, length unit mm)
    r2: Rectangle "media1" | pos = {-50*h1, 0}; size = {100*h1, 40*h1}
    r3: Rectangle "media2" | pos = {-50*h1, 40*h1}; size = {100*h1, 40*h1}
    r4: Rectangle "line1" | pos = {-10*h1, 40*h1}; size = {6*h1, t}
    r5: Rectangle "line2" | pos = {4*h1, 40*h1}; size = {6*h1, t}
    fin: Finalize "Form Union"

Materials
  mat1: Common "Air" on domains 2
    def "Basic"
      thermalexpansioncoefficient = alpha_p(pA,T)
      molarmass = 0.02897[kg/mol]
      bulkviscosity = muB(T)
      relpermeability = 1
      relpermittivity = 1
      dynamicviscosity = eta(T)
      ratioofspecificheat = 1.4
      electricconductivity = 0[S/m]
      heatcapacity = Cp(T)
      density = rho(pA,T)
      thermalconductivity = k(T)
      soundspeed = cs(T)
      eta: Piecewise | arg = T; pieces = {200.0, 1600.0, -8.38278E-7+8.35717342E-8*T^1-7.69429583E-11*T^2+4.6437266E-14*T^3-1.06585607E-17*T^4}; argunit = K; fununit = Pa*s
      Cp: Piecewise | arg = T; pieces = {200.0, 1600.0, 1047.63657-0.372589265*T^1+9.45304214E-4*T^2-6.02409443E-7*T^3+1.2858961E-10*T^4}; argunit = K; fununit = J/(kg*K)
      rho: Analytic | expr = pA*0.02897/R_const[K*mol/J]/T; args = {pA, T}; dermethod = manual; argders = {{pA, d(pA*0.02897/R_const/T,pA)}, {T, d(pA*0.02897/R_const/T,T)}}; argunit = Pa,K; fununit = kg/m^3
      k: Piecewise | arg = T; pieces = {200.0, 1600.0, -0.00227583562+1.15480022E-4*T^1-7.90252856E-8*T^2+4.11702505E-11*T^3-7.43864331E-15*T^4}; argunit = K; fununit = W/(m*K)
      cs: Analytic | expr = sqrt(1.4*R_const[K*mol/J]/0.02897*T); args = T; dermethod = manual; argunit = K; fununit = m/s
      an1: Analytic | funcname = alpha_p; expr = -1/rho(pA,T)*d(rho(pA,T),T); args = {pA, T}; argunit = Pa,K; fununit = 1/K
      an2: Analytic "Analytic 2a" | funcname = muB; expr = 0.6*eta(T); args = T; argunit = K; fununit = Pa*s
    RefractiveIndex
      n = 1
      ki = 0
    NonlinearModel
      BA = (def.gamma+1)/2
  mat2: Common "Copper" on domains 3, 4
    def "Basic"
      relpermeability = 1
      electricconductivity = 5.998e7[S/m]
      thermalexpansioncoefficient = 17e-6[1/K]
      heatcapacity = 385[J/(kg*K)]
      relpermittivity = 1
      density = 8960[kg/m^3]
      thermalconductivity = 400[W/(m*K)]
    Enu "Young's modulus and Poisson's ratio"
      youngsmodulus = 110e9[Pa]
      poissonsratio = 0.35
    linzRes "Linearized resistivity"
      rho0 = 1.72e-8[ohm*m]
      alpha = 0.0039[1/K]
      Tref = 298[K]
  mat3: Common "Material 3" on domains 1
    def "Basic"
      relpermittivity = 3.5
      relpermeability = 1
    DielectricLoss "Dielectric losses"
      epsilonBis = 0
      epsilonPrim = 0
      eta_epsilon = 0.02

Physics
  es: Electrostatics on domains 1-4
    dependent variable V
    ccn1: ChargeConservation (default) | materialType = nonSolid
    zc1: ZeroCharge (default)
    init1: init "Initial Values 1" (default)
    pot1: ElectricPotential on boundaries 11-14 | V0 = 100
    pot3: ElectricPotential on boundaries 1-3, 5, 16, 17
    pot4: ElectricPotential on boundaries 6-9

Mesh
  mesh1 "Mesh 1" (physics-controlled)
    size: MeshSizeDefault | hauto = 3

Studies
  std1 "Study 1"
    stat: Stationary

Solver configurations
  sol1 "Solution 1" (study std1)

Datasets
  dset1: Solution | solution = sol1
  dset2: Solution "Probe Solution 2" | solution = sol1
  cpt1: CutPoint2D "Domain Point Probe 1" | data = dset2; pointx = 0; pointy = 20

Derived values
  pev1: EvalPoint "Point Probe Expression 1" | data = cpt1; table = tbl1; expr = V

Tables
  mm1: Table "Maximum and minimum values"
    // Max/min surface
    x | y | Electric potential (V)
    -25 | 1.81818 | 0
    2.9956 | 20.4916 | 100
  tbl1: Table "Probe Table 1"
    Electric potential (V), Point: (0, 20)
    42.8326

Plots
  pg1: PlotGroup2D "Electric Potential (es)" | data = dset1
    surf1: Surface | expr = V
  pg2: PlotGroup1D "Probe Plot Group 2" | data = none
    tblp1: Table "Probe Table Graph 1" | table = tbl1; xaxisdata = auto; plotcolumns = 1